import sys
import math
import Sofa
import socket
import numpy as np
import cisstRobotPython
import geometry_util as geo

class SpringEnv (Sofa.PythonScriptController):
    joints = np.array([-0.38621387104, 0.0774590107285, 0.09299714089, 1.43742456259, -0.206321114646, 0.21373609284])
    step = 0.02
    axis_scale=100
    transform = np.array([[-0.18685107,-0.14393309,-0.97178698,-0.03070723],[0.95535989,-0.25706586,-0.14561806,-0.00643087],[-0.228854,-0.9556152,0.18554093,-0.08042132],[ 0.,0.,0.,1.]])
    transform_inv = geo.invertTransformation(transform)
    transform_inv = np.matmul(np.array([[1,0,0,0],[0,1,0,100],[0,0,1,0],[0,0,0,1]]),transform_inv)
    robot = cisstRobotPython.robManipulator(transform_inv)

    def __init__(self, node, commandLineArguments) :
        self.count = 0
        self.commandLineArguments = commandLineArguments
        print("Command line arguments for python : "+str(commandLineArguments))
        self.last_pos = [0, 72, 0, 0, 0, 0, 1]
        self.robot.LoadRobot('/home/jieying/catkin_ws/src/cisst-saw/sawIntuitiveResearchKit/share/deprecated/dvpsm.rob')
        self.createGraph(node)

    def output(self):
        return


    def populateNonMoving(self, node, filename, translation=[0, 0, 0], rotation=[0, 0, 0], scale=[1, 1, 1], mass=1.0, color='red'):
        node.createObject('MeshSTLLoader', name='loader', filename=filename)
        node.createObject('MeshTopology', src='@loader')
        node.createObject('MechanicalObject', name='mecha', src='@loader', scale3d=scale, translation=translation, rotation=rotation)
        node.createObject('TTriangleModel', simulated=0, moving=0)
        node.createObject('TLineModel', simulated=0, moving=0)
        node.createObject('TPointModel', simulated=0, moving=0)
        node.createObject('OglModel', name='visu', src='@loader', scale3d=scale, translation=translation, rotation=rotation, color=color)


    def populateRigid(self, node, filename, translation=[0, 0, 0], rotation=[0, 0, 0], scale=[1, 1, 1], mass=1.0, color='red'):
        node.createObject('EulerImplicitSolver', printLog='false', rayleighStiffness='0.1', name='odesolver', rayleighMass='0.1')
        node.createObject('CGLinearSolver', threshold='1e-9', tolerance='1e-9', name='linearSolver', iterations='25')
        if (filename[-4:] == '.obj'):
            node.createObject('MeshObjLoader', name='loader', filename=filename)
        elif (filename[-4:] == '.STL' or filename[-4:] == '.stl'):
            node.createObject('MeshSTLLoader', name='loader', filename=filename)
        node.createObject('MechanicalObject', name='mecha', template='Rigid3d', scale3d=scale, translation=translation, rotation=rotation)
        node.createObject('UniformMass', totalMass=mass)
        node.createObject('UncoupledConstraintCorrection')

        # Visual Node
        VisuNode = node.createChild('Visu_Cyl')
        VisuNode.createObject('OglModel', name='visual', src='@../loader', color=color, scale3d=scale)
        VisuNode.createObject('RigidMapping', input='@..', output='@visual')

        # Collision Node
        CollNode = node.createChild('Coll_Cyl')
        CollNode.createObject('MeshTopology', src="@../loader")
        CollNode.createObject('MechanicalObject', src='@../loader', scale3d=scale)
        CollNode.createObject('TPointModel')
        CollNode.createObject('TLineModel')
        CollNode.createObject('TTriangleModel')
        CollNode.createObject('RigidMapping')

        return 0

    def populateVec(self, node, filename, translation=[0, 0, 0], rotation=[0, 0, 0], scale=[1, 1, 1], mass=1.0, color='red'):
        node.createObject('EulerImplicitSolver', printLog='false', rayleighStiffness='0.1', name='odesolver', rayleighMass='0.1')
        node.createObject('CGLinearSolver', threshold='1e-9', tolerance='1e-9', name='linearSolver', iterations='25')
        if (filename[-4:] == '.obj'):
            node.createObject('MeshObjLoader', name='loader', filename=filename)
        elif (filename[-4:] == '.STL' or filename[-4:] == '.stl'):
            node.createObject('MeshSTLLoader', name='loader', filename=filename)
        node.createObject('MeshTopology', src='@loader')
        node.createObject('MechanicalObject', name='mecha', template='Vec3d', scale3d=scale, translation=translation, rotation=rotation)
        node.createObject('TriangleFEMForceField', youngModulus='3e6', poissonRatio='0')
        node.createObject('UniformMass', totalMass=mass)
        node.createObject('UncoupledConstraintCorrection')

        # Visual Node
        VisuNode = node.createChild('Visu_Cyl')
        VisuNode.createObject('OglModel', name='visual', src='@../loader', color=color, scale3d=scale)
        VisuNode.createObject('IdentityMapping', input='@..', output='@visual')

        # Collision Node
        CollNode = node.createChild('Coll_Cyl')
        CollNode.createObject('MeshTopology', src="@../loader")
        CollNode.createObject('MechanicalObject', src='@../loader', scale3d=scale)
        CollNode.createObject('TPointModel')
        CollNode.createObject('TLineModel')
        CollNode.createObject('TTriangleModel')
        CollNode.createObject('IdentityMapping')

        return 0


    def populateSpring(self, spring, translation, rotation, color='gray'):
#        index = [29575, 29040, 29597]
        spring.createObject('EulerImplicitSolver', printLog='false', rayleighStiffness='0.03', name='odesolver', rayleighMass='1')
        spring.createObject('CGLinearSolver', threshold='1e-9', tolerance='1e-9', name='linearSolver', iterations='30')
#        spring.createObject('TetrahedronSetTopologyContainer', src='@loader', fileTopology='meshes/steel_extension_spring.msh')
#        spring.createObject('TetrahedronSetGeometryAlgorithms', template='Vec3d')
        spring.createObject('CylinderGridTopology', nx='3', ny='3', length='25', radius='1', nz='2', axis='1 0 0', name='topo')
        spring.createObject('MechanicalObject', template='Vec3d', name='spring', rotation=rotation, translation=translation)
#        spring.createObject('TriangularBendingSprings', stiffness='1e3', damping='1')
        spring.createObject('TriangularFEMForceField', youngModulus='5', poissonRatio='0.4')
#        spring.createObject('TetrahedronFEMForceField', youngModulus='7e2', poissonRatio='0.26', computeGlobalMatrix="false", method="large")
#        spring.createObject('MeshSpringForceField', tetrasStiffness='1e3', tetrasDamping='1')
#        spring.createObject('RestShapeSpringsForceField', stiffness='5')#, damping='1')
        spring.createObject('UniformMass', totalMass=1.0)
        spring.createObject('FixedConstraint', indices=[0, 1, 2, 3, 4, 5, 6, 7, 8], name='FixedConstraint')
        spring.createObject('UncoupledConstraintCorrection')

        # rootNode/Spring/VisuSpring
        VisuSpring = spring.createChild('VisuSpring')
        VisuSpring.createObject('OglModel', name='visu', src='@../topo', color=color, template='ExtVec3d', rotation=rotation, translation=translation)
        VisuSpring.createObject('BarycentricMapping', input='@../spring', output='@visu')

        # rootNode/Spring/CollSpring
#        CollSpring = spring.createChild('CollSpring')
#        CollSpring.createObject('MechanicalObject', name='coll', src='@../topo', template='Vec3d', rotation=rotation, translation=translation)
#        CollSpring.createObject('TTriangleModel')
#        CollSpring.createObject('TLineModel')
#        CollSpring.createObject('TPointModel')
#        CollSpring.createObject('BarycentricMapping', input='@../spring', output='@.')

        return 0

    def populateLink(self,link, N, translation='0 0 0', rotation='0 0 0', color='gray'):
        link.createObject('EulerImplicitSolver', printLog='false', rayleighStiffness='0.03', name='odesolver', rayleighMass='1')
        link.createObject('CGLinearSolver', threshold='1e-9', tolerance='1e-9', name='linearSolver', iterations='20')
        pose = self.robot.ForwardKinematics(self.joints, N=N)
        link_pos = geo.matToPos(pose)

        link.createObject('MechanicalObject', name='mecha', template='Rigid3d', position=link_pos)
        link.createObject('UniformMass', totalMass='1')#, showAxisSizeFactor=str(self.axis_scale))
        link.createObject('UncoupledConstraintCorrection')


    def createGraph(self,rootNode):
        rootNode.createObject('RequiredPlugin', pluginName='SofaMiscCollision SofaPython SofaOpenglVisual')# SofaCUDA')
        rootNode.createObject('VisualStyle', displayFlags='showBehaviorModels')# showCollisionModels')# showInteractionForceFields showForceFields')
        rootNode.createObject('FreeMotionAnimationLoop', solveVelocityConstraintFirst=0)
        rootNode.createObject('LCPConstraintSolver', maxIt=1000, tolerance=1e-6, mu=0.9)
        rootNode.createObject('DefaultPipeline', depth=5, verbose=0, draw=0)
        rootNode.createObject('BruteForceDetection')
        rootNode.createObject('MinProximityIntersection', contactDistance=1, alarmDistance=5)
        rootNode.createObject('DiscreteIntersection')
        rootNode.createObject('DefaultContactManager')

        tableWidth = 95.7
        tableHeight = 72

        # rootNode/Support0
        supportHeight = 95.7
        offset = tableWidth/2+16
        height = supportHeight/2
        translation = [-offset, height, 0]
        Support0 = rootNode.createChild('Support0')
        self.populateNonMoving(Support0, 'meshes/lego_support.STL', translation=translation, color='blue')
        self.Support0 = Support0

        # rootNode/Support1
        translation = [0, height, -offset]
        rotation = [0, 90, 0]
        Support1 = rootNode.createChild('Support1')
        self.populateNonMoving(Support1, 'meshes/lego_support.STL', translation=translation, rotation=rotation, color='blue')
        self.Support1 = Support1

        # rootNode/Support2
        translation = [offset, height, 0]
        rotation = [0, 180, 0]
        Support2 = rootNode.createChild('Support2')
        self.populateNonMoving(Support2, 'meshes/lego_support.STL', translation=translation, rotation=rotation, color='blue')
        self.Support2 = Support2

        # rootNode/Support3
        translation = [0, height, offset]
        rotation = [0, 270, 0]
        Support3 = rootNode.createChild('Support3')
        self.populateNonMoving(Support3, 'meshes/lego_support.STL', translation=translation, rotation=rotation, color='blue')
        self.Support3 = Support3

        # rootNode/Tabletop
        translation = [0, tableHeight+1, 0]
        Tabletop = rootNode.createChild('Tabletop')
        self.populateVec(Tabletop, 'meshes/lego_platform_2.STL', translation=translation, mass=73.6, color='green')
        self.Tabletop = Tabletop

        # rootNode/Spring0
        offset = tableWidth/2+15
        springAngle = 32
        springLength = 38.1
        springHeight = tableHeight + 5
        translation = [-offset, springHeight, 0]
        rotation = [0, 0, -springAngle]
        Spring0 = rootNode.createChild('Spring0')
        self.populateSpring(Spring0, translation, rotation)
        self.Spring0 = Spring0

        # rootNode/Spring1
        translation=[0, springHeight, -offset]
        # Euler angle in XYZ form
        rotation = [-90, 270-springAngle, 90]
        Spring1 = rootNode.createChild('Spring1')
        self.populateSpring(Spring1, translation, rotation, color='red')
        self.Spring1 = Spring1

        # rootNode/Spring2
        translation=[offset, springHeight, 0]
        rotation = [0, 0, 180+springAngle]
        Spring2 = rootNode.createChild('Spring2')
        self.populateSpring(Spring2, translation, rotation, color='yellow')
        self.Spring2 = Spring2

        # rootNode/Spring3
        translation=[0, springHeight, offset]
        rotation = [90, 90+springAngle, 90]
        Spring3 = rootNode.createChild('Spring3')
        self.populateSpring(Spring3, translation, rotation, color='blue')
        self.Spring3 = Spring3

#        rootNode.createObject('NearestPointROI', template="Vec3", name="np0", object1="@Tabletop/mecha", object2="@Spring0/spring0", radius="0.1")
#    rootNode.createObject('AttachConstraint', object1="@M1", object2="@M2", twoWay="true", indices1="@np1.indices1", indices2="@np1.indices2")


#        rootNode.createObject('AttachConstraint', name='ac0', object1='@Tabletop', object2='@Spring0', twoWay='true', indices1='@np0.indices1', indices2='np0.indicies2', constraintFactor='1')
        rootNode.createObject('AttachConstraint', name='ac0', object1='@Tabletop', object2='@Spring0', twoWay='true', indices1='599', indices2='13', constraintFactor='1')
        rootNode.createObject('AttachConstraint', name='ac1', object1='@Tabletop', object2='@Spring1', twoWay='true', indices1='625', indices2='13', constraintFactor='1')
        rootNode.createObject('AttachConstraint', name='ac2', object1='@Tabletop', object2='@Spring2', twoWay='true', indices1='612', indices2='13', constraintFactor='1')
        rootNode.createObject('AttachConstraint', name='ac3', object1='@Tabletop', object2='@Spring3', twoWay='true', indices1='586', indices2='13', constraintFactor='1')

        # rootNode/Link0
        Link0 = rootNode.createChild('Link0')
        self.populateLink(Link0, 0)
        self.Link0 = Link0

        # rootNode/Link1
        Link1 = rootNode.createChild('Link1')
        self.populateLink(Link1, 1)
        self.Link1 = Link1

        # rootNode/Link2
        Link2 = rootNode.createChild('Link2')
        self.populateLink(Link2, 2)
        self.Link2 = Link2

        # rootNode/Link3
        Link3 = rootNode.createChild('Link3')
        self.populateLink(Link3, 3)
        self.Link3 = Link3

        # rootNode/Link4
        Link4 = rootNode.createChild('Link4')
        self.populateLink(Link4, 4)
        self.Link4 = Link4

        # rootNode/Link5
        Link5 = rootNode.createChild('Link5')
        self.populateLink(Link5, 5)
        self.Link5 = Link5

        # rootNode/Link6
        Link6 = rootNode.createChild('Link6')
        self.populateLink(Link6, 6)
        self.Link6 = Link6

        # rootNode/Cylinder
        scale = [0.2, 0.2, 0.2]
#        translation = [12, 90, -8]
        Cylinder = rootNode.createChild('Cylinder')
        cylinderPos = self.robot.ForwardKinematics(self.joints)
        print(str(cylinderPos))
        self.populateRigid(Cylinder, 'meshes/cylinder_rot.obj', translation=geo.matToTrans(cylinderPos), rotation=geo.matToRot(cylinderPos), scale=scale, mass=1e3, color='yellow')
        self.Cylinder = Cylinder

        return 0

    def onMouseButtonLeft(self, mouseX,mouseY,isPressed):
        ## usage e.g.Cylinder
        #    print "Control+Left mouse button pressed at position "+str(mouseX)+", "+str(mouseY)
        return 0

    def onKeyReleased(self, c):
        ## usage e.g.
        #if c=="A" :
        #    print "You released a"
        return 0

    def initGraph(self, node):
        ## Please feel free to add an example for a simple usage in /home/trs/sofa/build/unstable//home/trs/sofa/src/sofa/applications/plugins/SofaPython/scn2python.py
        return 0

    def updateRobot(self):
        cylinderPos = self.robot.ForwardKinematics(self.joints)
        cylinderPos = geo.matToPos(cylinderPos)
        l0Pos = self.robot.ForwardKinematics(self.joints, N=0)
        l0Pos = geo.matToPos(l0Pos)
        l1Pos = self.robot.ForwardKinematics(self.joints, N=1)
        l1Pos = geo.matToPos(l1Pos)
        l2Pos = self.robot.ForwardKinematics(self.joints, N=2)
        l2Pos = geo.matToPos(l2Pos)
        l3Pos = self.robot.ForwardKinematics(self.joints, N=3)
        l3Pos = geo.matToPos(l3Pos)
        l4Pos = self.robot.ForwardKinematics(self.joints, N=4)
        l4Pos = geo.matToPos(l4Pos)
        l5Pos = self.robot.ForwardKinematics(self.joints, N=5)
        l5Pos = geo.matToPos(l5Pos)
        l6Pos = self.robot.ForwardKinematics(self.joints, N=6)
        l6Pos = geo.matToPos(l6Pos)

        self.Cylinder.getObject('mecha').position = cylinderPos
        self.Link0.getObject('mecha').position = l0Pos
        self.Link1.getObject('mecha').position = l1Pos
        self.Link2.getObject('mecha').position = l2Pos
        self.Link3.getObject('mecha').position = l3Pos
        self.Link4.getObject('mecha').position = l4Pos
        self.Link5.getObject('mecha').position = l5Pos
        self.Link6.getObject('mecha').position = l6Pos

    # Note: Hold control when key is pressed
    def onKeyPressed(self, c):
        # usage e.g.
        if c == "Q":
            self.joints[0] += self.step
        if c == "W":
            self.joints[0] -= self.step
        if c == "A":
            self.joints[1] += self.step
        if c == "D":
            self.joints[1] -= self.step
        if c == "Z":
            self.joints[2] += self.step
        if c == "X":
            self.joints[2] -= self.step
        if c == "T":
            self.joints[3] += self.step
        if c == "Y":
            self.joints[3] -= self.step
        if c == "G":
            self.joints[4] += self.step
        if c == "H":
            self.joints[4] -= self.step
        if c == "V":
            self.joints[5] += self.step
        if c == "B":
            self.joints[5] -= self.step

        self.updateRobot()
        return 0

    def onMouseWheel(self, mouseX,mouseY,wheelDelta):
        ## usage e.g.
        #if isPressed :
        #    print "Control button pressed+mouse wheel turned at position "+str(mouseX)+", "+str(mouseY)+", wheel delta"+str(wheelDelta)
        return 0

    def storeResetState(self):
        ## Please feel free to add an example for a simple usage in /home/trs/sofa/build/unstable//home/trs/sofa/src/sofa/applications/plugins/SofaPython/scn2python.py
        return 0

    def cleanup(self):
        ## Please feel free to add an example for a simple usage in /home/trs/sofa/build/unstable//home/trs/sofa/src/sofa/applications/plugins/SofaPython/scn2python.py
        # self.conn.close()
        self.f.close()
        return 0

    def onGUIEvent(self, strControlID,valueName,strValue):
        ## Please feel free to add an example for a simple usage in /home/trs/sofa/build/unstable//home/trs/sofa/src/sofa/applications/plugins/SofaPython/scn2python.py
        print 'onGUIEvent'
        return 0

    def onEndAnimationStep(self, deltaTime):
        ## Please feel free to add an example for a simple usage in /home/trs/sofa/build/unstable//home/trs/sofa/src/sofa/applications/plugins/SofaPython/scn2python.py
        pos = np.array(self.Tabletop.getObject('mecha').position)
#        self.f.write(str(pos) + '\n')
        self.f.write(str(pos[287]) + str(pos[286]) + str(pos[288]) + str(pos[290]) + '\n')
#        self.Tabletop.getObject('mecha').position = geo.arrToStr(self.last_pos)
#        print('pos is ' + str(pos))
#        print('last_pos is ' + str(self.last_pos[0]))
#        self.last_pos = pos

        return 0

    def onLoaded(self, node):
        ## Please feel free to add an example for a simple usage in /home/trs/sofa/build/unstable//home/trs/sofa/src/sofa/applications/plugins/SofaPython/scn2python.py
        return 0

    def reset(self):
        ## Please feel free to add an example for a simple usage in /home/trs/sofa/build/unstable//home/trs/sofa/src/sofa/applications/plugins/SofaPython/scn2python.py
        return 0

    def onMouseButtonMiddle(self, mouseX,mouseY,isPressed):
        ## usage e.g.
        #if isPressed :
        #    print "Control+Middle mouse button pressed at position "+str(mouseX)+", "+str(mouseY)
        return 0

    def bwdInitGraph(self, node):
        ## Please feel free to add an example for a simple usage in /home/trs/sofa/build/unstable//home/trs/sofa/src/sofa/applications/plugins/SofaPython/scn2python.py
        self.f = open("measurements/position.txt","w+")

        return 0

    def onScriptEvent(self, senderNode, eventName,data):
        ## Please feel free to add an example for a simple usage in /home/trs/sofa/build/unstable//home/trs/sofa/src/sofa/applications/plugins/SofaPython/scn2python.py
        print 'onScriptEvent'
        return 0

    def onMouseButtonRight(self, mouseX,mouseY,isPressed):
        ## usage e.g.
        #if isPressed :
        #    print "Control+Right mouse button pressed at position "+str(mouseX)+", "+str(mouseY)
        return 0

    def onBeginAnimationStep(self, deltaTime):
        ## Please feel free to add an example for a simple usage in /home/trs/sofa/build/unstable//home/trs/sofa/src/sofa/applications/plugins/SofaPython/scn2python.py
        return 0

def createScene(rootNode):
    rootNode.findData('dt').value = '0.001062699'
    rootNode.findData('gravity').value = '0 0 0'
    try :
        sys.argv[0]
    except :
        commandLineArguments = []
    else :
        commandLineArguments = sys.argv
    my_env = SpringEnv(rootNode,commandLineArguments)

    return 0
